*Heading
** Job name: cme Model name: Model-1
** Generated by: Abaqus/CAE 2021
*Preprint, echo=NO, model=NO, history=NO, contact=NO
**
** PARTS
**
*Part, name=Part-1
*Node
      1,   4.57999992,  -7.07999992,          90.
      2,   4.57999992,   6.19500017,          90.
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*Element, type=C3D20R
1,  28,  35,  34,  17,   1,   2,   3,   4, 128, 127, 126, 125, 129, 130, 131,
   132, 134, 133, 135, 136
2,  27,  36,  33,  18,  28,  35,  34,  17, 140, 139, 138, 137, 128, 127, 126,
   125, 142, 141, 143, 144
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*Nset, nset=_PickedSet3, internal, generate
   1,  400,    1
*Elset, elset=_PickedSet3, internal, generate
  1,  49,   1
** Section: Section-1
*Solid Section, elset=_PickedSet3, material=Material-1
,
*End Part
**
**
** ASSEMBLY
**
*Assembly, name=Assembly
**
*Instance, name=Part-1-1, part=Part-1
*End Instance
**
*Nset, nset=force, instance=Part-1-1, generate
 1,  4,  1
*Nset, nset=guding, instance=Part-1-1
  13,  14,  15,  16,  61,  62
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*Elset, elset=guding, instance=Part-1-1, generate
 29,  49,   1
*Elset, elset=_Surf-1_S2, internal, instance=Part-1-1
 1,
*Surface, type=ELEMENT, name=Surf-1
_Surf-1_S2, S2
*End Assembly
**
** MATERIALS
**
*Material, name=Material-1
*Elastic
200000., 0.3
**
** BOUNDARY CONDITIONS
**
** Name: BC-1 Type: 对称/反对称/完全固定
*Boundary
guding, ENCASTRE
** ----------------------------------------------------------------
**
** STEP: Step-1
**
*Step, name=Step-1, nlgeom=NO
*Static
1., 1., 1e-05, 1.
**
** LOADS
**
** Name: Load-1   Type: Concentrated force
*Cload
force, 3, 50.
**
** OUTPUT REQUESTS
**
*Restart, write, frequency=0
**
** FIELD OUTPUT: F-Output-1
**
*Output, field, variable=PRESELECT
**
** HISTORY OUTPUT: H-Output-1
**
*Output, history, variable=PRESELECT
*End Step
